# Transport, chemical tanker, residual fuel oil powered, Atlantic of Central/South America to US Caribbean

Dataset: openLCA process, unit process
Category: 48-49: Transportation and Warehousing / 4831: Deep Sea, Coastal, and Great Lakes Water Transportation
Time period: 2024-01-01 to 2024-12-31
Allocation method: physical allocation
Data quality: US EPA - Process Pedigree Matrix (5;1)
Exchange data quality scheme: US EPA - Flow Pedigree Matrix
Generated by: ERG
Published in: ERG (2025) Marine Transport v1.0
restrictionsDescription: These U.S. LCI Database Project data ("Data") are provided by the National Renewable Energy Laboratory ("NREL"), operated by the Alliance for Sustainable Energy, LLC ("Alliance") for the US Department of Energy ("DOE") under Contract No. DE-AC36-08GO28308. The United States Government (the "Government") retains and the user acknowledges that the Government retains a non-exclusive, paid-up, irrevocable, worldwide license to publish or reproduce the published form of these data, or allow others to do so, for Government purposes.
Access to and use of these Data shall impose the following obligations on the user, as set forth in this Agreement. The user is granted the right, without any fee or cost, to use, copy, modify, alter, enhance and distribute these Data for any purpose whatsoever, provided that this entire notice appears in all copies of the Data. Any modification, alteration or enhancement of these data shall be identified and documented by the user. Further, the user agrees to credit the DOE/NREL/Alliance in any publication that results from the use of these Data. The names DOE/NREL/Alliance, however, may not be used in any advertising or publicity to endorse or promote any products or commercial entities unless specific written permission is obtained from DOE/NREL/Alliance. The user also understands that DOE/NREL/Alliance is not obligated to provide the user with any support, consulting, training or assistance of any kind with regard to the use of these Data or to provide the user with any updates, revisions or new versions of these Data.
YOU AGREE TO INDEMNIFY THE GOVERNMENT AND DOE/NREL/ALLIANCE, AND ITS SUBSIDIARIES, AFFILIATES, OFFICERS, AGENTS, AND EMPLOYEES AGAINST ANY CLAIM OR DEMAND, INCLUDING REASONABLE ATTORNEYS' FEES, RELATED TO YOUR USE OF THESE DATA. THESE DATA ARE PROVIDED BY DOE/NREL/ALLIANCE "AS IS" AND ANY EXPRESS OR IMPLIED WARRANTIES, INCLUDING BUT NOT LIMITED TO, THE IMPLIED WARRANTIES OF MERCHANTABILITY AND FITNESS FOR A PARTICULAR PURPOSE ARE DISCLAIMED. IN NO EVENT SHALL THE GOVERNMENT OR DOE/NREL/ALLIANCE BE LIABLE FOR ANY SPECIAL, INDIRECT OR CONSEQUENTIAL DAMAGES OR ANY DAMAGES WHATSOEVER, INCLUDING BUT NOT LIMITED TO CLAIMS ASSOCIATED WITH THE LOSS OF DATA OR PROFITS, WHICH MAY RESULT FROM AN ACTION IN CONTRACT, NEGLIGENCE OR OTHER TORTIOUS CLAIM THAT ARISES OUT OF OR IN CONNECTION WITH THE ACCESS, USE OR PERFORMANCE OF THESE DATA.

## General comment
This dataset represents the movement of goods via a Chemical Tanker using Residual fuel oil as a fuel source. The reference flow is the movement of 1 metric ton of goods for a distance of 1 km.

## Technology
[SHIP DESCRIPTION]

## Geography
This process assumes an average emissions rate based on a route from XX to YY. The route is also used to estimate the portion of emissions that occur within an Emissions Control Area (ECA), where reduced emissions are required. Note no location object is assigned as emissions are primarily occuring in open waters.

## Time period
This process reflects the vehicle fleet as estimated in 2024.

## Reference product
- Transport, chemical tanker, residual fuel oil powered: 1 t*km

## Inputs
- Residual fuel oil, at refinery: 0.00118337 kg; data quality (5,5,5,5,5)

## Outputs
All rows: data quality (5,5,5,5,5)
- Carbon dioxide: 0.000474878, 0.003109 kg (2 entries)
- Carbon monoxide: 8.96232e-7, 7.016e-6 kg (2 entries)
- Methane: 7.20002e-9, 5.948e-8 kg (2 entries)
- Nitrogen oxides: 1.12668e-5, 7.363e-5 kg (2 entries)
- Nitrous oxide: 2.80551e-8, 1.583e-7 kg (2 entries)
- Particulate matter, ≤ 10μm: 4.02355e-7 kg
  ECA
- Particulate matter, ≤ 10μm: 8.5513e-8, 3.714e-6 kg (2 entries)
  nonECA
- Particulate matter, ≤ 2.5μm: 3.91077e-7 kg
  ECA
- Particulate matter, ≤ 2.5μm: 8.3002e-8, 3.604e-6 kg (2 entries)
  nonECA
- Sulfur dioxide: 3.90865e-7 kg
  ECA
- Sulfur dioxide: 3.452e-7, 1.495e-5 kg (2 entries)
  nonECA
- Volatile organic compounds: 3.79083e-7, 3.134e-6 kg (2 entries)

## Completeness
To be added.

## Use advice
This process is intended to connect to fuel supply processes in the USLCI.

## Project
This dataset was developed by the Federal LCA Commons Data Curator Eastern Research Group, Inc. (ERG) under subcontract (SUB-2024-10066) to the National Renewable Energy Laboratory under Department of Energy (DOE) Prime Contract No. DE-AC36-08GO28308. The work is funded by DOE's Advanced Materials & Manufacturing Technologies Office (AMMTO).
