# Transport, chemical tanker; residual fuel oil powered; Pacific of Central/South America to US West Coast

Dataset: openLCA process, unit process
Category: 48-49: Transportation and Warehousing / 4831: Deep Sea, Coastal, and Great Lakes Water Transportation
Geography: Global
Time period: 2023-01-01 to 2023-12-31
Allocation method: physical allocation
Data quality: US EPA - Process Pedigree Matrix (4;2)
Exchange data quality scheme: US EPA - Flow Pedigree Matrix
Generated by: ERG
Published in: ERG (2025) Marine Transport v1.0
restrictionsDescription: These U.S. LCI Database Project data ("Data") are provided by the National Renewable Energy Laboratory ("NREL"), operated by the Alliance for Sustainable Energy, LLC ("Alliance") for the US Department of Energy ("DOE") under Contract No. DE-AC36-08GO28308. The United States Government (the "Government") retains and the user acknowledges that the Government retains a non-exclusive, paid-up, irrevocable, worldwide license to publish or reproduce the published form of these data, or allow others to do so, for Government purposes.
Access to and use of these Data shall impose the following obligations on the user, as set forth in this Agreement. The user is granted the right, without any fee or cost, to use, copy, modify, alter, enhance and distribute these Data for any purpose whatsoever, provided that this entire notice appears in all copies of the Data. Any modification, alteration or enhancement of these data shall be identified and documented by the user. Further, the user agrees to credit the DOE/NREL/Alliance in any publication that results from the use of these Data. The names DOE/NREL/Alliance, however, may not be used in any advertising or publicity to endorse or promote any products or commercial entities unless specific written permission is obtained from DOE/NREL/Alliance. The user also understands that DOE/NREL/Alliance is not obligated to provide the user with any support, consulting, training or assistance of any kind with regard to the use of these Data or to provide the user with any updates, revisions or new versions of these Data.
YOU AGREE TO INDEMNIFY THE GOVERNMENT AND DOE/NREL/ALLIANCE, AND ITS SUBSIDIARIES, AFFILIATES, OFFICERS, AGENTS, AND EMPLOYEES AGAINST ANY CLAIM OR DEMAND, INCLUDING REASONABLE ATTORNEYS' FEES, RELATED TO YOUR USE OF THESE DATA. THESE DATA ARE PROVIDED BY DOE/NREL/ALLIANCE "AS IS" AND ANY EXPRESS OR IMPLIED WARRANTIES, INCLUDING BUT NOT LIMITED TO, THE IMPLIED WARRANTIES OF MERCHANTABILITY AND FITNESS FOR A PARTICULAR PURPOSE ARE DISCLAIMED. IN NO EVENT SHALL THE GOVERNMENT OR DOE/NREL/ALLIANCE BE LIABLE FOR ANY SPECIAL, INDIRECT OR CONSEQUENTIAL DAMAGES OR ANY DAMAGES WHATSOEVER, INCLUDING BUT NOT LIMITED TO CLAIMS ASSOCIATED WITH THE LOSS OF DATA OR PROFITS, WHICH MAY RESULT FROM AN ACTION IN CONTRACT, NEGLIGENCE OR OTHER TORTIOUS CLAIM THAT ARISES OUT OF OR IN CONNECTION WITH THE ACCESS, USE OR PERFORMANCE OF THESE DATA.

## General comment
This dataset represents the movement of goods via a Chemical Tanker using Residual fuel oil as a fuel source. The reference flow is the movement of a unit of mass of goods (e.g., 1 kg) across a distance (e.g., 1 km). Emissions account for vessel activity during transit, maneuvering, hotelling, and anchorage.

## Technology
Chemical Tankers are liquid-cargo vessels that transport chemicals in bulk. This type is modeled as Handymax with a capacity of 48000.0 metric tons and an assumed utilization of 98.0%. Vessel characteristics are sourced from EPA Ports Emissions Inventory Guidance, Appendix C (USEPA 2022).

## Geography
This process assumes an average emissions rate based on a route from Pacific of Central/South America to US West Coast. The route is also used to estimate the portion of emissions that occur within an Emissions Control Area (ECA), where reduced emissions are required. Note no location object is assigned as emissions are primarily occuring in open waters.

## Time period
This process reflects the marine fleet as estimated in 2023 based on vessel Entrance and Clearance data for U.S. ports for that year.

## Reference product
- Transport, chemical tanker; residual fuel oil powered: 1 t*km

## Inputs
- Residual fuel oil, at refinery: 0.001225 kg; data quality (3,3,2,2,1)

## Outputs
- 1,3-Butadiene: 3.295e-7, 3.302e-6 g (2 entries); data quality (3,4,2,2,1)
- 2,2,4-Trimethylpentane: 2.316e-6, 2.321e-5 g (2 entries); data quality (3,4,2,2,1)
- Acenaphthene: 1.656e-8, 1.659e-7 g (2 entries); data quality (3,4,2,2,1)
- Acenaphthylene: 3.838e-8, 3.846e-7 g (2 entries); data quality (3,4,2,2,1)
- Acetaldehyde: 3.182e-6, 3.189e-5 g (2 entries); data quality (3,4,2,2,1)
- Acrolein: 6.011e-7, 6.023e-6 g (2 entries); data quality (3,4,2,2,1)
- Ammonia: 1.873e-5, 0.0001322 g (2 entries); data quality (3,4,2,2,1)
- Anthracene: 1.119e-7, 1.121e-6 g (2 entries); data quality (3,4,2,2,1)
- Antimony: 5.984e-7, 4.225e-6 g (2 entries); data quality (3,4,2,2,1)
- Arsenic: 2.52e-8, 1.779e-7 g (2 entries); data quality (3,4,2,2,1)
- Benz[a]anthracene: 8.582e-9, 6.059e-8 g (2 entries); data quality (3,4,2,2,1)
- Benzene: 1.541e-6, 1.545e-5 g (2 entries); data quality (3,4,2,2,1)
- Benzo[a]pyrene: 4.067e-9, 2.872e-8 g (2 entries); data quality (3,4,2,2,1)
- Benzo[k]fluoranthene: 4.067e-9, 2.872e-8 g (2 entries); data quality (3,4,2,2,1)
- Cadmium: 2.296e-7, 1.621e-6 g (2 entries); data quality (3,4,2,2,1)
- Carbon dioxide: 0.4573, 3.229 g (2 entries); data quality (2,3,2,2,1)
- Carbon monoxide: 0.000794, 0.0073 g (2 entries); data quality (2,3,2,2,1)
- Chrysene: 1.586e-8, 1.12e-7 g (2 entries); data quality (3,4,2,2,1)
- Fluoranthene: 8.728e-8, 6.162e-7 g (2 entries); data quality (3,4,2,2,1)
- Fluorene: 5.334e-8, 5.345e-7 g (2 entries); data quality (3,4,2,2,1)
- Formaldehyde: 1.389e-5, 0.0001392 g (2 entries); data quality (3,4,2,2,1)
- Hexane: 9.075e-7, 9.094e-6 g (2 entries); data quality (3,4,2,2,1)
- Lead: 1.216e-7, 8.587e-7 g (2 entries); data quality (3,4,2,2,1)
- Manganese: 3.133e-9, 2.212e-8 g (2 entries); data quality (3,4,2,2,1)
- Mercury: 4.067e-11, 2.872e-10 g (2 entries); data quality (3,4,2,2,1)
- Methane: 6.179e-6, 6.189e-5 g (2 entries); data quality (2,3,2,2,1)
- Naphthalene: 1.018e-5, 0.000102 g (2 entries); data quality (3,4,2,2,1)
- Nickel: 6.684e-7, 4.719e-6 g (2 entries); data quality (3,4,2,2,1)
- Nitrogen oxides: 0.01084, 0.07657 g (2 entries); data quality (2,3,2,2,1)
- Nitrous oxide: 2.835e-5, 0.0001648 g (2 entries); data quality (2,3,2,2,1)
- Particulate matter, ≤ 10μm: 0.0003553 g; data quality (2,3,2,2,1)
  ECA
- Particulate matter, ≤ 10μm: 0.0001211, 0.00386 g (2 entries); data quality (2,3,2,2,1)
  nonECA
- Particulate matter, ≤ 2.5μm: 0.0003447 g; data quality (2,3,2,2,1)
  ECA
- Particulate matter, ≤ 2.5μm: 0.0001174, 0.003743 g (2 entries); data quality (2,3,2,2,1)
  nonECA
- Phenanthrene: 4.41e-7, 4.42e-6 g (2 entries); data quality (3,4,2,2,1)
- Polychlorinated biphenyls: 4.067e-10, 2.872e-9 g (2 entries); data quality (3,4,2,2,1)
- Propionaldehyde: 4.934e-7, 4.945e-6 g (2 entries); data quality (3,4,2,2,1)
- Pyrene: 3.279e-8, 2.315e-7 g (2 entries); data quality (3,4,2,2,1)
- Selenium: 4.262e-11, 3.009e-10 g (2 entries); data quality (3,4,2,2,1)
- Sulfur dioxide: 0.0003441 g; data quality (2,3,2,2,1)
  ECA
- Sulfur dioxide: 0.0004893, 0.01559 g (2 entries); data quality (2,3,2,2,1)
  nonECA
- Toluene: 6.619e-7, 6.633e-6 g (2 entries); data quality (3,4,2,2,1)
- Volatile organic compounds: 0.0003253, 0.003259 g (2 entries); data quality (2,3,2,2,1)
- o-Xylene: 1.669e-7, 1.672e-6 g (2 entries); data quality (3,4,2,2,1)

## Inventory method
Attributional process.

## Modelling constants
Engine kW ratings for propulsion, auxiliary and boilers were obtained from the EPA Ports Emisisons Inventory Guidance (USEPA 2022). For the auxiliary and boilers, the kW already took into account the load factor. For the propulsion a load factor was calculated using the well-known Propeller Law (see Equation 3.6 in USEPA 2022). The Propeller Law takes into account the sea margin, which is an efficiency factor of between 1.1 and 1.15 for weather conditions. However, at lower speeds, where the load is 20% or less, emissions are increased due to inefficiencies. These factors were also obtained from EPA (USEPA 2022). For these calculations we used the adjustment for load factors <=2%.

## Completeness
HAP speciation profiles from USEPA 2022 (see Appendix D) are applied to VOC and PM emission factors.

## Data selection
Representative routes were selected using shipping lanes between the most frequently visited ports based on the Entrance and Clearance data for 2023 (USACE 2023). Shipping lanes reflect the most efficient route between the origin and destination ports. The shipping lanes were from the Global Shipping Routes from ArcGIS which were originally generated from shipping lane vectors from the Map of the World Oceans. This analysis provided the typical transit distance and percentages in ECA zones.

## Data treatment
The average vessel speeds for the typical vessels are used to calculate the transit time by dividing the distance by speed. The average speed is calculated based on the mode of transit speed ratios multiplied by the max speed (USEPA 2022).
The time for the port, maneuvering, and anchorage times also need to be estimated. The international port times were derived from data from median time spent in port by container ships worldwide in 2021, by country. The US dwell times were based on a US average from 2022 of 34.6 hours for container ships and 41 hours for tankers (BTS 2023).
Maneuvering time was estimated based on the distance a ship travels from the breakwater to the pier/wharf/dock (PWD). Average maneuvering speeds range between 3 to 8 knots. Outbound speeds are usually faster since the ship does not need to dock (Browning 2006). Because of this we assumed a speed of 3 inbound and 5.5 for the outbound speed. The distance was measured from the innermost point of the port to the coastline plus 0.5 miles for the breakwater. These distances were averaged by the US region and global regions.
The anchorage time was assumed to be 6.5% of the total transit time. This is based on averaging the average percentage time of anchorage from AIS tracking, which ranges from 4% to 9%.

## Data collection
Data were modeled in 2025.

## Sampling procedure
Representative routes from various global regions were selected based on the most frequent vessel activity.

## Use advice
Select routes are provided from various global regions to the United States. The choice of route primarily impacts the share of the emissions that occur during transit relative to near-shore emissions during maneuvering, hotelling, and anchorage. These processes are generally applicable to outgoing transit as well. This process is intended to connect to fuel supply processes in the USLCI.

## Intended application
Situation C1 - Accounting, with system-external interactions - The intended application is a purely descriptive accounting / documentation of the analyzed system including existing interactions with other systems in the LCI model. The target audience of this model includes LCA practitioners, industry, and the general public. A full inventory of environmental flows are included; thus this unit process can be used for a full range of LCIA impact categories.

## Project
This dataset was developed by the Federal LCA Commons Data Curator Eastern Research Group, Inc. (ERG) under subcontract (SUB-2024-10066) to the National Renewable Energy Laboratory under Department of Energy (DOE) Prime Contract No. DE-AC36-08GO28308. The work is funded by DOE's Advanced Materials & Manufacturing Technologies Office (AMMTO).

## Review Dependent internal review
ERG internally reviewed the underlying assumptions and operations to generate the datasets and the metadata.

## Sources
- USEPA (2022) Port Emissions Inventory Guidance
- Browning (2006)
- USACE (2023) Vessel Entrances and Clearances
- BTS (2023) Container Dwell Times
- BTS (2023) Tanker Dwell Times
